*Heading
** Job name: v500 Model name: mesh_500
** Generated by: Abaqus/CAE 2019
*Preprint, echo=NO, model=NO, history=NO, contact=NO
**
** PARTS
**
*Part, name=PART-1
*Node
      1,     0.301532,  0.236953005, -0.156450003
      2,  0.251515001,  0.341688991, -0.339920014
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*Element, type=S3R
23535,    10,     8,     9
23536,     9,  9661,    10
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*Element, type=C3D4
51017,     4,    17,  9664,    15
51018,  9661,  9665,  9662,  9663
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*Elset, elset=PSHELL_0, generate
 23535,  51016,      1
*Elset, elset=PSOLID_1, generate
 51017,  51065,      1
*Elset, elset=PSOLID_2, generate
 51066,  51127,      1
*Elset, elset=PSOLID_3, generate
 51128,  51232,      1
*Elset, elset=PSOLID_4, generate
 51233,  51299,      1
*Elset, elset=PSOLID_5, generate
 51300,  51320,      1
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*Elset, elset=PSOLID_10, generate
 51563,  51592,      1
*Elset, elset=PSOLID_11, generate
 51593,  51667,      1
*Elset, elset=PSOLID_12, generate
 51668,  51714,      1
*Elset, elset=PSOLID_13, generate
 51715,  51753,      1
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*Elset, elset=PSOLID_18, generate
 51986,  52007,      1
*Elset, elset=PSOLID_19, generate
 52008,  52118,      1
*Elset, elset=PSOLID_20, generate
 52119,  52213,      1
*Elset, elset=PSOLID_21, generate
 52214,  52276,      1
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*Elset, elset=PSOLID_26, generate
 52519,  52548,      1
*Elset, elset=PSOLID_27, generate
 52549,  52582,      1
*Elset, elset=PSOLID_28, generate
 52583,  52633,      1
*Elset, elset=PSOLID_29, generate
 52634,  52668,      1
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*Elset, elset=PSOLID_34, generate
 52877,  52941,      1
*Elset, elset=PSOLID_35, generate
 52942,  52977,      1
*Elset, elset=PSOLID_36, generate
 52978,  53023,      1
*Elset, elset=PSOLID_37, generate
 53024,  53085,      1
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*Elset, elset=PSOLID_42, generate
 53361,  53421,      1
*Elset, elset=PSOLID_43, generate
 53422,  53574,      1
*Elset, elset=PSOLID_44, generate
 53575,  53645,      1
*Elset, elset=PSOLID_45, generate
 53646,  53731,      1
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*Elset, elset=PSOLID_50, generate
 53981,  54042,      1
*Elset, elset=PSOLID_51, generate
 54043,  54178,      1
*Elset, elset=PSOLID_52, generate
 54179,  54261,      1
*Elset, elset=PSOLID_53, generate
 54262,  54308,      1
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*Elset, elset=PSOLID_58, generate
 54608,  54669,      1
*Elset, elset=PSOLID_59, generate
 54670,  54844,      1
*Elset, elset=PSOLID_60, generate
 54845,  54913,      1
*Elset, elset=PSOLID_61, generate
 54914,  54939,      1
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*Elset, elset=PSOLID_66, generate
 55291,  55397,      1
*Elset, elset=PSOLID_67, generate
 55398,  55513,      1
*Elset, elset=PSOLID_68, generate
 55514,  55642,      1
*Elset, elset=PSOLID_69, generate
 55643,  55746,      1
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*Elset, elset=PSOLID_74, generate
 56028,  56149,      1
*Elset, elset=PSOLID_75, generate
 56150,  56175,      1
*Elset, elset=PSOLID_76, generate
 56176,  56223,      1
*Elset, elset=PSOLID_77, generate
 56224,  56306,      1
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*Elset, elset=PSOLID_82, generate
 56629,  56687,      1
*Elset, elset=PSOLID_83, generate
 56688,  56726,      1
*Elset, elset=PSOLID_84, generate
 56727,  56784,      1
*Elset, elset=PSOLID_85, generate
 56785,  56828,      1
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*Elset, elset=PSOLID_90, generate
 57141,  57179,      1
*Elset, elset=PSOLID_91, generate
 57180,  57308,      1
*Elset, elset=PSOLID_92, generate
 57309,  57375,      1
*Elset, elset=PSOLID_93, generate
 57376,  57476,      1
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*Elset, elset=PSOLID_98, generate
 57833,  57931,      1
*Elset, elset=PSOLID_99, generate
 57932,  58034,      1
*Elset, elset=PSOLID_100, generate
 58035,  58106,      1
*Elset, elset=PSOLID_101, generate
 58107,  58155,      1
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*Elset, elset=PSOLID_106, generate
 58601,  58682,      1
*Elset, elset=PSOLID_107, generate
 58683,  58725,      1
*Elset, elset=PSOLID_108, generate
 58726,  58885,      1
*Elset, elset=PSOLID_109, generate
 58886,  58988,      1
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*Elset, elset=PSOLID_114, generate
 59257,  59296,      1
*Elset, elset=PSOLID_115, generate
 59297,  59337,      1
*Elset, elset=PSOLID_116, generate
 59338,  59375,      1
*Elset, elset=PSOLID_117, generate
 59376,  59471,      1
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*Elset, elset=PSOLID_122, generate
 59800,  59917,      1
*Elset, elset=PSOLID_123, generate
 59918,  59999,      1
*Elset, elset=PSOLID_124, generate
 60000,  60087,      1
*Elset, elset=PSOLID_125, generate
 60088,  60186,      1
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*Elset, elset=PSOLID_130, generate
 60429,  60587,      1
*Elset, elset=PSOLID_131, generate
 60588,  60659,      1
*Elset, elset=PSOLID_132, generate
 60660,  60742,      1
*Elset, elset=PSOLID_133, generate
 60743,  60829,      1
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*Elset, elset=PSOLID_138, generate
 61283,  61357,      1
*Elset, elset=PSOLID_139, generate
 61358,  61421,      1
*Elset, elset=PSOLID_140, generate
 61422,  61549,      1
*Elset, elset=PSOLID_141, generate
 61550,  61617,      1
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*Elset, elset=PSOLID_146, generate
 61797,  61872,      1
*Elset, elset=PSOLID_147, generate
 61873,  61915,      1
*Elset, elset=PSOLID_148, generate
 61916,  61987,      1
*Elset, elset=PSOLID_149, generate
 61988,  62069,      1
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*Elset, elset=PSOLID_154, generate
 62231,  62374,      1
*Elset, elset=PSOLID_155, generate
 62375,  62435,      1
*Elset, elset=PSOLID_156, generate
 62436,  62452,      1
*Elset, elset=PSOLID_157, generate
 62453,  62524,      1
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*Elset, elset=PSOLID_162, generate
 62793,  62885,      1
*Elset, elset=PSOLID_163, generate
 62886,  62950,      1
*Elset, elset=PSOLID_164, generate
 62951,  63008,      1
*Elset, elset=PSOLID_165, generate
 63009,  63060,      1
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*Elset, elset=PSOLID_170, generate
 63382,  63433,      1
*Elset, elset=PSOLID_171, generate
 63434,  63479,      1
*Elset, elset=PSOLID_172, generate
 63480,  63627,      1
*Elset, elset=PSOLID_173, generate
 63628,  63652,      1
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*Elset, elset=PSOLID_178, generate
 63956,  63970,      1
*Elset, elset=PSOLID_179, generate
 63971,  64072,      1
*Elset, elset=PSOLID_180, generate
 64073,  64104,      1
*Elset, elset=PSOLID_181, generate
 64105,  64179,      1
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*Elset, elset=PSOLID_186, generate
 64559,  64660,      1
*Elset, elset=PSOLID_187, generate
 64661,  64712,      1
*Elset, elset=PSOLID_188, generate
 64713,  64786,      1
*Elset, elset=PSOLID_189, generate
 64787,  64854,      1
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*Elset, elset=PSOLID_194, generate
 65120,  65197,      1
*Elset, elset=PSOLID_195, generate
 65198,  65260,      1
*Elset, elset=PSOLID_196, generate
 65261,  65352,      1
*Elset, elset=PSOLID_197, generate
 65353,  65423,      1
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*Elset, elset=PSOLID_202, generate
 65794,  65878,      1
*Elset, elset=PSOLID_203, generate
 65879,  65937,      1
*Elset, elset=PSOLID_204, generate
 65938,  66062,      1
*Elset, elset=PSOLID_205, generate
 66063,  66109,      1
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*Elset, elset=PSOLID_210, generate
 66410,  66497,      1
*Elset, elset=PSOLID_211, generate
 66498,  66612,      1
*Elset, elset=PSOLID_212, generate
 66613,  66664,      1
*Elset, elset=PSOLID_213, generate
 66665,  66770,      1
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*Elset, elset=PSOLID_218, generate
 67015,  67078,      1
*Elset, elset=PSOLID_219, generate
 67079,  67177,      1
*Elset, elset=PSOLID_220, generate
 67178,  67249,      1
*Elset, elset=PSOLID_221, generate
 67250,  67328,      1
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*Elset, elset=PSOLID_226, generate
 67616,  67735,      1
*Elset, elset=PSOLID_227, generate
 67736,  67833,      1
*Elset, elset=PSOLID_228, generate
 67834,  67888,      1
*Elset, elset=PSOLID_229, generate
 67889,  67966,      1
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*Elset, elset=PSOLID_234, generate
 68181,  68293,      1
*Elset, elset=PSOLID_235, generate
 68294,  68354,      1
*Elset, elset=PSOLID_236, generate
 68355,  68413,      1
*Elset, elset=PSOLID_237, generate
 68414,  68472,      1
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*Elset, elset=PSOLID_242, generate
 68711,  68833,      1
*Elset, elset=PSOLID_243, generate
 68834,  68942,      1
*Elset, elset=PSOLID_244, generate
 68943,  69114,      1
*Elset, elset=PSOLID_245, generate
 69115,  69184,      1
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*Elset, elset=PSOLID_250, generate
 69588,  69631,      1
*Elset, elset=PSOLID_251, generate
 69632,  69682,      1
*Elset, elset=PSOLID_252, generate
 69683,  69787,      1
*Elset, elset=PSOLID_253, generate
 69788,  69859,      1
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*Elset, elset=PSOLID_258, generate
 70121,  70177,      1
*Elset, elset=PSOLID_259, generate
 70178,  70223,      1
*Elset, elset=PSOLID_260, generate
 70224,  70300,      1
*Elset, elset=PSOLID_261, generate
 70301,  70372,      1
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*Elset, elset=PSOLID_266, generate
 70692,  70732,      1
*Elset, elset=PSOLID_267, generate
 70733,  70829,      1
*Elset, elset=PSOLID_268, generate
 70830,  70934,      1
*Elset, elset=PSOLID_269, generate
 70935,  71015,      1
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*Elset, elset=PSOLID_274, generate
 71316,  71367,      1
*Elset, elset=PSOLID_275, generate
 71368,  71425,      1
*Elset, elset=PSOLID_276, generate
 71426,  71455,      1
*Elset, elset=PSOLID_277, generate
 71456,  71538,      1
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*Elset, elset=PSOLID_282, generate
 71827,  71909,      1
*Elset, elset=PSOLID_283, generate
 71910,  71964,      1
*Elset, elset=PSOLID_284, generate
 71965,  72082,      1
*Elset, elset=PSOLID_285, generate
 72083,  72208,      1
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*Elset, elset=PSOLID_290, generate
 72484,  72513,      1
*Elset, elset=PSOLID_291, generate
 72514,  72595,      1
*Elset, elset=PSOLID_292, generate
 72596,  72683,      1
*Elset, elset=PSOLID_293, generate
 72684,  72715,      1
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*Elset, elset=PSOLID_298, generate
 73030,  73105,      1
*Elset, elset=PSOLID_299, generate
 73106,  73166,      1
*Elset, elset=PSOLID_300, generate
 73167,  73246,      1
*Elset, elset=PSOLID_301, generate
 73247,  73391,      1
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*Elset, elset=PSOLID_306, generate
 73607,  73678,      1
*Elset, elset=PSOLID_307, generate
 73679,  73768,      1
*Elset, elset=PSOLID_308, generate
 73769,  73831,      1
*Elset, elset=PSOLID_309, generate
 73832,  73886,      1
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*Elset, elset=PSOLID_314, generate
 74127,  74204,      1
*Elset, elset=PSOLID_315, generate
 74205,  74303,      1
*Elset, elset=PSOLID_316, generate
 74304,  74337,      1
*Elset, elset=PSOLID_317, generate
 74338,  74389,      1
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*Elset, elset=PSOLID_322, generate
 74682,  74724,      1
*Elset, elset=PSOLID_323, generate
 74725,  74868,      1
*Elset, elset=PSOLID_324, generate
 74869,  74962,      1
*Elset, elset=PSOLID_325, generate
 74963,  75019,      1
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*Elset, elset=PSOLID_330, generate
 75366,  75393,      1
*Elset, elset=PSOLID_331, generate
 75394,  75542,      1
*Elset, elset=PSOLID_332, generate
 75543,  75577,      1
*Elset, elset=PSOLID_333, generate
 75578,  75701,      1
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*Elset, elset=PSOLID_338, generate
 76115,  76198,      1
*Elset, elset=PSOLID_339, generate
 76199,  76267,      1
*Elset, elset=PSOLID_340, generate
 76268,  76340,      1
*Elset, elset=PSOLID_341, generate
 76341,  76384,      1
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*Elset, elset=PSOLID_346, generate
 76653,  76711,      1
*Elset, elset=PSOLID_347, generate
 76712,  76848,      1
*Elset, elset=PSOLID_348, generate
 76849,  76936,      1
*Elset, elset=PSOLID_349, generate
 76937,  76958,      1
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*Elset, elset=PSOLID_354, generate
 77201,  77259,      1
*Elset, elset=PSOLID_355, generate
 77260,  77399,      1
*Elset, elset=PSOLID_356, generate
 77400,  77465,      1
*Elset, elset=PSOLID_357, generate
 77466,  77552,      1
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*Elset, elset=PSOLID_362, generate
 77889,  77977,      1
*Elset, elset=PSOLID_363, generate
 77978,  78096,      1
*Elset, elset=PSOLID_364, generate
 78097,  78190,      1
*Elset, elset=PSOLID_365, generate
 78191,  78268,      1
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*Elset, elset=PSOLID_370, generate
 78490,  78565,      1
*Elset, elset=PSOLID_371, generate
 78566,  78682,      1
*Elset, elset=PSOLID_372, generate
 78683,  78785,      1
*Elset, elset=PSOLID_373, generate
 78786,  78841,      1
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*Elset, elset=PSOLID_378, generate
 79205,  79253,      1
*Elset, elset=PSOLID_379, generate
 79254,  79318,      1
*Elset, elset=PSOLID_380, generate
 79319,  79361,      1
*Elset, elset=PSOLID_381, generate
 79362,  79434,      1
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*Elset, elset=PSOLID_386, generate
 79684,  79761,      1
*Elset, elset=PSOLID_387, generate
 79762,  79856,      1
*Elset, elset=PSOLID_388, generate
 79857,  79887,      1
*Elset, elset=PSOLID_389, generate
 79888,  79924,      1
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*Elset, elset=PSOLID_394, generate
 80126,  80227,      1
*Elset, elset=PSOLID_395, generate
 80228,  80258,      1
*Elset, elset=PSOLID_396, generate
 80259,  80381,      1
*Elset, elset=PSOLID_397, generate
 80382,  80436,      1
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*Elset, elset=PSOLID_402, generate
 80877,  80953,      1
*Elset, elset=PSOLID_403, generate
 80954,  81016,      1
*Elset, elset=PSOLID_404, generate
 81017,  81134,      1
*Elset, elset=PSOLID_405, generate
 81135,  81180,      1
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*Elset, elset=PSOLID_410, generate
 81462,  81633,      1
** Section: quartz
*Solid Section, elset=PSOLID_2, material=quartz
,
** Section: quartz
*Solid Section, elset=PSOLID_4, material=quartz
,
** Section: feldspar
*Solid Section, elset=PSOLID_5, material=feldspar
,
** Section: quartz
*Solid Section, elset=PSOLID_10, material=quartz
,
** Section: feldspar
*Solid Section, elset=PSOLID_12, material=feldspar
,
** Section: feldspar
*Solid Section, elset=PSOLID_13, material=feldspar
,
** Section: quartz
*Solid Section, elset=PSOLID_18, material=quartz
,
** Section: feldspar
*Solid Section, elset=PSOLID_20, material=feldspar
,
** Section: feldspar
*Solid Section, elset=PSOLID_21, material=feldspar
,
** Section: quartz
*Solid Section, elset=PSOLID_26, material=quartz
,
** Section: feldspar
*Solid Section, elset=PSOLID_28, material=feldspar
,
** Section: feldspar
*Solid Section, elset=PSOLID_29, material=feldspar
,
** Section: quartz
*Solid Section, elset=PSOLID_34, material=quartz
,
** Section: feldspar
*Solid Section, elset=PSOLID_36, material=feldspar
,
** Section: feldspar
*Solid Section, elset=PSOLID_37, material=feldspar
,
** Section: feldspar
*Solid Section, elset=PSOLID_42, material=feldspar
,
** Section: quartz
*Solid Section, elset=PSOLID_44, material=quartz
,
** Section: feldspar
*Solid Section, elset=PSOLID_45, material=feldspar
,
** Section: quartz
*Solid Section, elset=PSOLID_50, material=quartz
,
** Section: feldspar
*Solid Section, elset=PSOLID_52, material=feldspar
,
** Section: feldspar
*Solid Section, elset=PSOLID_53, material=feldspar
,
** Section: feldspar
*Solid Section, elset=PSOLID_58, material=feldspar
,
** Section: feldspar
*Solid Section, elset=PSOLID_60, material=feldspar
,
** Section: feldspar
*Solid Section, elset=PSOLID_61, material=feldspar
,
** Section: quartz
*Solid Section, elset=PSOLID_66, material=quartz
,
** Section: feldspar
*Solid Section, elset=PSOLID_68, material=feldspar
,
** Section: feldspar
*Solid Section, elset=PSOLID_69, material=feldspar
,
** Section: feldspar
*Solid Section, elset=PSOLID_74, material=feldspar
,
** Section: quartz
*Solid Section, elset=PSOLID_76, material=quartz
,
** Section: feldspar
*Solid Section, elset=PSOLID_77, material=feldspar
,
** Section: feldspar
*Solid Section, elset=PSOLID_82, material=feldspar
,
** Section: quartz
*Solid Section, elset=PSOLID_84, material=quartz
,
** Section: feldspar
*Solid Section, elset=PSOLID_85, material=feldspar
,
** Section: quartz
*Solid Section, elset=PSOLID_90, material=quartz
,
** Section: feldspar
*Solid Section, elset=PSOLID_92, material=feldspar
,
** Section: feldspar
*Solid Section, elset=PSOLID_93, material=feldspar
,
** Section: feldspar
*Solid Section, elset=PSOLID_98, material=feldspar
,
** Section: feldspar
*Solid Section, elset=PSOLID_100, material=feldspar
,
** Section: feldspar
*Solid Section, elset=PSOLID_101, material=feldspar
,
** Section: feldspar
*Solid Section, elset=PSOLID_106, material=feldspar
,
** Section: feldspar
*Solid Section, elset=PSOLID_108, material=feldspar
,
** Section: feldspar
*Solid Section, elset=PSOLID_109, material=feldspar
,
** Section: feldspar
*Solid Section, elset=PSOLID_114, material=feldspar
,
** Section: quartz
*Solid Section, elset=PSOLID_116, material=quartz
,
** Section: feldspar
*Solid Section, elset=PSOLID_117, material=feldspar
,
** Section: quartz
*Solid Section, elset=PSOLID_122, material=quartz
,
** Section: feldspar
*Solid Section, elset=PSOLID_124, material=feldspar
,
** Section: feldspar
*Solid Section, elset=PSOLID_125, material=feldspar
,
** Section: feldspar
*Solid Section, elset=PSOLID_130, material=feldspar
,
** Section: quartz
*Solid Section, elset=PSOLID_132, material=quartz
,
** Section: feldspar
*Solid Section, elset=PSOLID_133, material=feldspar
,
** Section: quartz
*Solid Section, elset=PSOLID_138, material=quartz
,
** Section: feldspar
*Solid Section, elset=PSOLID_140, material=feldspar
,
** Section: feldspar
*Solid Section, elset=PSOLID_141, material=feldspar
,
** Section: feldspar
*Solid Section, elset=PSOLID_146, material=feldspar
,
** Section: quartz
*Solid Section, elset=PSOLID_148, material=quartz
,
** Section: feldspar
*Solid Section, elset=PSOLID_149, material=feldspar
,
** Section: feldspar
*Solid Section, elset=PSOLID_154, material=feldspar
,
** Section: feldspar
*Solid Section, elset=PSOLID_156, material=feldspar
,
** Section: feldspar
*Solid Section, elset=PSOLID_157, material=feldspar
,
** Section: feldspar
*Solid Section, elset=PSOLID_162, material=feldspar
,
** Section: quartz
*Solid Section, elset=PSOLID_164, material=quartz
,
** Section: feldspar
*Solid Section, elset=PSOLID_165, material=feldspar
,
** Section: feldspar
*Solid Section, elset=PSOLID_170, material=feldspar
,
** Section: quartz
*Solid Section, elset=PSOLID_172, material=quartz
,
** Section: feldspar
*Solid Section, elset=PSOLID_173, material=feldspar
,
** Section: feldspar
*Solid Section, elset=PSOLID_178, material=feldspar
,
** Section: quartz
*Solid Section, elset=PSOLID_180, material=quartz
,
** Section: feldspar
*Solid Section, elset=PSOLID_181, material=feldspar
,
** Section: feldspar
*Solid Section, elset=PSOLID_186, material=feldspar
,
** Section: quartz
*Solid Section, elset=PSOLID_188, material=quartz
,
** Section: feldspar
*Solid Section, elset=PSOLID_189, material=feldspar
,
** Section: quartz
*Solid Section, elset=PSOLID_194, material=quartz
,
** Section: quartz
*Solid Section, elset=PSOLID_196, material=quartz
,
** Section: feldspar
*Solid Section, elset=PSOLID_197, material=feldspar
,
** Section: feldspar
*Solid Section, elset=PSOLID_202, material=feldspar
,
** Section: feldspar
*Solid Section, elset=PSOLID_204, material=feldspar
,
** Section: feldspar
*Solid Section, elset=PSOLID_205, material=feldspar
,
** Section: quartz
*Solid Section, elset=PSOLID_210, material=quartz
,
** Section: quartz
*Solid Section, elset=PSOLID_212, material=quartz
,
** Section: feldspar
*Solid Section, elset=PSOLID_213, material=feldspar
,
** Section: quartz
*Solid Section, elset=PSOLID_218, material=quartz
,
** Section: quartz
*Solid Section, elset=PSOLID_220, material=quartz
,
** Section: feldspar
*Solid Section, elset=PSOLID_221, material=feldspar
,
** Section: feldspar
*Solid Section, elset=PSOLID_226, material=feldspar
,
** Section: quartz
*Solid Section, elset=PSOLID_228, material=quartz
,
** Section: feldspar
*Solid Section, elset=PSOLID_229, material=feldspar
,
** Section: quartz
*Solid Section, elset=PSOLID_234, material=quartz
,
** Section: feldspar
*Solid Section, elset=PSOLID_236, material=feldspar
,
** Section: feldspar
*Solid Section, elset=PSOLID_237, material=feldspar
,
** Section: quartz
*Solid Section, elset=PSOLID_242, material=quartz
,
** Section: feldspar
*Solid Section, elset=PSOLID_244, material=feldspar
,
** Section: feldspar
*Solid Section, elset=PSOLID_245, material=feldspar
,
** Section: feldspar
*Solid Section, elset=PSOLID_250, material=feldspar
,
** Section: quartz
*Solid Section, elset=PSOLID_252, material=quartz
,
** Section: feldspar
*Solid Section, elset=PSOLID_253, material=feldspar
,
** Section: feldspar
*Solid Section, elset=PSOLID_258, material=feldspar
,
** Section: feldspar
*Solid Section, elset=PSOLID_260, material=feldspar
,
** Section: feldspar
*Solid Section, elset=PSOLID_261, material=feldspar
,
** Section: feldspar
*Solid Section, elset=PSOLID_266, material=feldspar
,
** Section: quartz
*Solid Section, elset=PSOLID_268, material=quartz
,
** Section: feldspar
*Solid Section, elset=PSOLID_269, material=feldspar
,
** Section: feldspar
*Solid Section, elset=PSOLID_274, material=feldspar
,
** Section: quartz
*Solid Section, elset=PSOLID_276, material=quartz
,
** Section: feldspar
*Solid Section, elset=PSOLID_277, material=feldspar
,
** Section: quartz
*Solid Section, elset=PSOLID_282, material=quartz
,
** Section: quartz
*Solid Section, elset=PSOLID_284, material=quartz
,
** Section: feldspar
*Solid Section, elset=PSOLID_285, material=feldspar
,
** Section: quartz
*Solid Section, elset=PSOLID_290, material=quartz
,
** Section: feldspar
*Solid Section, elset=PSOLID_292, material=feldspar
,
** Section: feldspar
*Solid Section, elset=PSOLID_293, material=feldspar
,
** Section: feldspar
*Solid Section, elset=PSOLID_298, material=feldspar
,
** Section: feldspar
*Solid Section, elset=PSOLID_300, material=feldspar
,
** Section: feldspar
*Solid Section, elset=PSOLID_301, material=feldspar
,
** Section: feldspar
*Solid Section, elset=PSOLID_306, material=feldspar
,
** Section: feldspar
*Solid Section, elset=PSOLID_308, material=feldspar
,
** Section: feldspar
*Solid Section, elset=PSOLID_309, material=feldspar
,
** Section: feldspar
*Solid Section, elset=PSOLID_314, material=feldspar
,
** Section: quartz
*Solid Section, elset=PSOLID_316, material=quartz
,
** Section: feldspar
*Solid Section, elset=PSOLID_317, material=feldspar
,
** Section: quartz
*Solid Section, elset=PSOLID_322, material=quartz
,
** Section: quartz
*Solid Section, elset=PSOLID_324, material=quartz
,
** Section: feldspar
*Solid Section, elset=PSOLID_325, material=feldspar
,
** Section: quartz
*Solid Section, elset=PSOLID_330, material=quartz
,
** Section: feldspar
*Solid Section, elset=PSOLID_332, material=feldspar
,
** Section: feldspar
*Solid Section, elset=PSOLID_333, material=feldspar
,
** Section: quartz
*Solid Section, elset=PSOLID_338, material=quartz
,
** Section: quartz
*Solid Section, elset=PSOLID_340, material=quartz
,
** Section: feldspar
*Solid Section, elset=PSOLID_341, material=feldspar
,
** Section: feldspar
*Solid Section, elset=PSOLID_346, material=feldspar
,
** Section: quartz
*Solid Section, elset=PSOLID_348, material=quartz
,
** Section: feldspar
*Solid Section, elset=PSOLID_349, material=feldspar
,
** Section: feldspar
*Solid Section, elset=PSOLID_354, material=feldspar
,
** Section: quartz
*Solid Section, elset=PSOLID_356, material=quartz
,
** Section: feldspar
*Solid Section, elset=PSOLID_357, material=feldspar
,
** Section: quartz
*Solid Section, elset=PSOLID_362, material=quartz
,
** Section: quartz
*Solid Section, elset=PSOLID_364, material=quartz
,
** Section: feldspar
*Solid Section, elset=PSOLID_365, material=feldspar
,
** Section: quartz
*Solid Section, elset=PSOLID_370, material=quartz
,
** Section: feldspar
*Solid Section, elset=PSOLID_372, material=feldspar
,
** Section: feldspar
*Solid Section, elset=PSOLID_373, material=feldspar
,
** Section: quartz
*Solid Section, elset=PSOLID_378, material=quartz
,
** Section: quartz
*Solid Section, elset=PSOLID_380, material=quartz
,
** Section: feldspar
*Solid Section, elset=PSOLID_381, material=feldspar
,
** Section: feldspar
*Solid Section, elset=PSOLID_386, material=feldspar
,
** Section: quartz
*Solid Section, elset=PSOLID_388, material=quartz
,
** Section: feldspar
*Solid Section, elset=PSOLID_389, material=feldspar
,
** Section: quartz
*Solid Section, elset=PSOLID_394, material=quartz
,
** Section: quartz
*Solid Section, elset=PSOLID_396, material=quartz
,
** Section: feldspar
*Solid Section, elset=PSOLID_397, material=feldspar
,
** Section: feldspar
*Solid Section, elset=PSOLID_402, material=feldspar
,
** Section: quartz
*Solid Section, elset=PSOLID_404, material=quartz
,
** Section: feldspar
*Solid Section, elset=PSOLID_405, material=feldspar
,
** Section: quartz
*Solid Section, elset=PSOLID_410, material=quartz
,
*End Part
**
**
** ASSEMBLY
**
*Assembly, name=Assembly
**
*Instance, name=PART-1-1, part=PART-1
*End Instance
**
*Elset, elset=ALL_3DSOLID, instance=PART-1-1, generate
 51017,  81633,      1
*Elset, elset=ALL_MASSIVE_ELEMENTS, instance=PART-1-1, generate
 23535,  81633,      1
*Nset, nset=boundary, instance=PART-1-1
    40,    43,    60,    61,    62,    63
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*End Assembly
**
** MATERIALS
**
*Material, name=feldspar
*Conductivity
 1.46,
*Density
2703.,
*Elastic
 8.702e+10, 0.29
*Expansion
  3.6e-06,    25.
  4.6e-06, 119.85
 5.19e-06, 219.85
 5.59e-06, 319.85
 5.89e-06, 419.85
 6.14e-06, 519.85
 6.37e-06, 619.85
 6.58e-06, 719.85
 6.78e-06, 819.85
 6.97e-06, 919.85
 7.12e-06,  1000.
*Specific Heat
 860., 50.
 945.,200.
1054.,400.
1090.,500.
*Material, name=quartz
*Conductivity
  8.,  1.
 6.5,100.
 5.5,200.
 4.5,300.
  4.,400.
 3.8,500.
 3.7,550.
 3.5,575.
 3.5,580.
 3.8,600.
 3.9,700.
  4.,800.
*Density
2650.,
*Elastic
    1e+11,  0.09,    0.
  9.5e+10, 0.085,  100.
    9e+10,  0.08,  200.
  8.5e+10,  0.05,  300.
  8.3e+10,    0.,  400.
    8e+10, -0.05,  500.
  7.5e+10,  -0.1,  550.
    6e+10,  -0.2,  575.
    8e+10,  -0.3,  580.
  9.5e+10,   0.2,  600.
    1e+11,  0.25,  700.
 1.05e+11,  0.25,  800.
*Expansion
    1e-05,  1.
 1.25e-05,100.
 1.26e-05,200.
 1.27e-05,300.
 1.28e-05,400.
  1.5e-05,500.
 1.75e-05,550.
    2e-05,575.
  2.5e-05,580.
 2.25e-05,600.
  2.1e-05,700.
    2e-05,800.
*Specific Heat
 700.,  1.
 810.,100.
 910.,200.
1005.,300.
1100.,400.
1190.,500.
1250.,550.
1400.,575.
1050.,580.
1070.,600.
1080.,700.
1090.,800.
** ----------------------------------------------------------------
**
** STEP: Step-1
**
*Step, name=Step-1, nlgeom=NO
*Coupled Temperature-displacement, creep=none, deltmx=30.
1., 1., 0.01, 1.
**
** BOUNDARY CONDITIONS
**
** Name: BC-1 Type: Symmetry/Antisymmetry/Encastre
*Boundary
boundary, ENCASTRE
**
** OUTPUT REQUESTS
**
*Restart, write, frequency=0
**
** FIELD OUTPUT: F-Output-1
**
*Output, field, variable=PRESELECT
**
** HISTORY OUTPUT: H-Output-1
**
*Output, history, variable=PRESELECT
*End Step
