*Heading
 **C:\peter_abaqus\Summer-Research-Project\meep\gen_geo\gmsh_out\simple_plane.inp
 **SI unit
 **simple plane simulation

*part,name=part-1
*NODE
1, 0, 0, 0
2, 1, 0, 0
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******* E L E M E N T S *************

*ELEMENT, type=CPS3, ELSET=Surface1
37, 68, 79, 38
38, 38, 72, 68
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
*Nset, nset=Set-1, generate
   1,  98,    1
*Elset, elset=Set-1, generate
   37,  198,    1
** Section: Section-1
*Solid Section, elset=Set-1, material=steel
,
*End Part
**
**
** ASSEMBLY
**
*Assembly, name=Assembly
**
*Instance, name=Part-1-1, part=Part-1
*End Instance
**
*Nset, nset=Set-1, instance=Part-1-1, generate
 20,  21,    1
*Elset, elset=Set-1, instance=Part-1-1, generate
  99,  100,    1
*Elset, elset=_Surf-1_S1, internal, instance=Part-1-1, generate
  41,  50,   1
*Surface, type=ELEMENT, name=Surf-1
_Surf-1_S1, S1
*End Assembly
**
** MATERIALS
**
*Material, name=steel
*Elastic
 1e+07, 0.3
** ----------------------------------------------------------------
**
** STEP: Step-1
**
*Step, name=Step-1, nlgeom=NO
first_step
*Static
1., 1., 1e-05, 1.
**
** BOUNDARY CONDITIONS
**
** Name: BC-1 Type: Symmetry/Antisymmetry/Encastre
*Boundary
Set-1, ENCASTRE
**
** LOADS
**
** Name: Load-1   Type: Pressure
*Dsload
Surf-1, P, 10.
**
** OUTPUT REQUESTS
**

*Restart, write, frequency=0
**
** FIELD OUTPUT: F-Output-1
**
*Output, field, variable=PRESELECT
**
** HISTORY OUTPUT: H-Output-1
**
*Output, history, variable=PRESELECT
*End Step
